// COMSOL Multiphysics 4.4.0.150 model "diapason.mph"
// Outline of the model tree

Geometry
  geom1 "Geometry 1" (3D, length unit mm)
    imp1: Import | type = stlvrml; filename = C:\Users\remi\Desktop\diapason.stl
    fin: Finalize "Form Union"

Materials
  mat1 "Steel AISI 4340" on domains 1
    def "Basic"
      relpermeability = 1
      electricconductivity = 4.032e6[S/m]
      thermalexpansioncoefficient = 12.3e-6[1/K]
      heatcapacity = 475[J/(kg*K)]
      relpermittivity = 1
      density = 7850[kg/m^3]
      thermalconductivity = 44.5[W/(m*K)]
    Enu "Young's modulus and Poisson's ratio"
      youngsmodulus = 205e9[Pa]
      poissonsratio = 0.28

Physics
  solid: SolidMechanics on all domains
    dependent variable u = {u, v, w}
    lemm1: LinearElasticModel "Linear Elastic Material 1" (default)
    free1: Free (default)
    init1: init "Initial Values 1" (default)
    fix1: Fixed "Fixed Constraint 1" on boundaries 14, 15, 20, 27

Mesh
  mesh1 "Mesh 1" (physics-controlled)
    size: MeshSizeDefault | hauto = 5

Studies
  std1 "Study 1"
    eig: Eigenfrequency | neigs = 20

Solver configurations
  sol1 "Solver 1" (study std1)
    v1: Variables "Dependent Variables 1"
    e1: Eigenvalue "Eigenvalue Solver 1" | neigs = 20; transform = eigenfrequency; shift = 0
      dDef: Direct
      prob1: SolverProblem "Information 1"
        warning1: SolverWarning "Warnings 1"

Datasets
  dset1: Solution | solution = sol1

Plots
  pg1: PlotGroup3D "Mode Shape (solid)" | data = dset1; animating = off
    surf1: Surface | expr = solid.disp
      def: Deform "Deformation" | expr = {u, v, w}

Exports
  anim1: Animation
    giffilename = C:\Users\remi\Documents\GitHub\agregation\MEPD\figures\diapason.gif
    sweeptype = dde
    maxframes = 50
    size = manual
    width = 250
    height = 600
    options = off
    axes = on
  play1: Player | sweeptype = dde